<?xml version="1.0"?>
<!--
MILTHRUST   [LBS]
MAXTHRUST   [LBS]
idlen1      [%]
maxn1       [%]
idlen2      [%]
maxn2       [%]
betarangeend[%]
    if ThrottleCmd < betarangeend/100.0 then engine power=idle, propeller pitch
    is controled by ThrottleCmd (between MINPITCH and  REVERSEPITCH).
    if ThrottleCmd > betarangeend/100.0 then engine power increases up to max reverse power
reversemaxpower [%]
    max engine power in reverse mode
maxpower    [HP]
psfc power specific fuel consumption [pph/HP] for N1=100%
n1idle_max_delay [-] time constant for N1 change
maxstartenginetime [sec]
    after this time the automatic starting cycle is interrupted when the engine
    doesn't start  (0=automatic starting not present)
startern1   [%]
    when starting starter spin up engine to this spin
ielumaxtorque [lb.ft]
    if torque>ielumaxtorque limiters decrease the throttle
    (ielu = Integrated Electronic Limiter Unit)
itt_delay [-] time constant for ITT change
    (ITT = Inter Turbine Temperature)


    based on PW119BL from do328
-->

<turbine_engine name="PW150A"><!--
  <bypassratio>     5.0  </bypassratio>--><!--
  <bleed>           0.03 </bleed>--><!--
  <ielumaxtorque> 100 </ielumaxtorque>-->

  <milthrust unit="LBS">       11357.5   </milthrust>
  <idlen1>                       24.6   </idlen1>
  <maxn1>                       104.2   </maxn1>
  <idlen2>                       54.3   </idlen2>
  <maxn2>                       101.1   </maxn2>
  <maxpower unit="HP">          5070   </maxpower>
  <psfc unit="LBS/HR/HP">0.01</psfc>
  <!--<idlefuelflow>                 50.0   </idlefuelflow>-->
  <n1idle_max_delay>              1     </n1idle_max_delay>
  <maxstartingtime>              80     </maxstartingtime>
  <startern1>                    20     </startern1>

  <itt_delay>                     0.05  </itt_delay>
  <betarangeend>                 50     </betarangeend>
  <reversemaxpower>              55     </reversemaxpower>
  <ielumaxtorque unit="FT*LB">3950</ielumaxtorque>


  <table name="EnginePowerVC">
    <description> Engine power, function of airspeed and pressure </description>
    <independentVar lookup="row">atmosphere/P-psf</independentVar>
    <independentVar lookup="column">velocities/ve-kts</independentVar>
    <tableData>
	0	50	100	150	200	250	300
503	0.630	0.788	0.829	0.836	0.840	0.841	0.845
1048	0.685	0.856	0.901	0.909	0.913	0.914	0.919
1328	0.721	0.901	0.949	0.957	0.961	0.962	0.967
1496	0.743	0.929	0.978	0.986	0.991	0.992	0.997
1684	0.751	0.939	0.988	0.996	1.001	1.002	1.007
1896	0.759	0.948	0.998	1.006	1.011	1.012	1.017
2135	0.764	0.955	1.006	1.014	1.019	1.020	1.025
2213	0.768	0.960	1.011	1.019	1.024	1.025	1.030

    </tableData>
  </table>

  <table name="EnginePowerRPM_N1" type="internal">
    <description> Engine Power, function of RPM and N1 </description>
    <tableData>
	0	5	65	70	80	90	104
0	.00	.50	.50	.50	.50	.50	.50
500	.00	.50	15.81	158.05	316.11	421.48	526.85
1000	.00	.50	25.17	228.80	457.61	602.11	752.64
1400	.00	.50	37.79	314.88	629.76	839.68	1049.60
1550	.00	.50	45.43	349.44	698.88	931.84	1164.80
1700	.00	.50	53.76	384.00	768.00	1024.00	1280.00

    </tableData>
  </table>

  <table name="ITT_N1" type="internal">
    <description> Inter-Turbine Temperature ITT [deg C] depending on N1 and engine run (0=off / 1=running) </description>
    <tableData>
              0     1
        0     0     0
        30   90   370
        65   180   550
      104   300   800
    </tableData>
  </table>

</turbine_engine>
