<?xml version="1.0"?>
<!-- Generated by Aero-Matic v 1.1

specs:
prop-pitch - -14.5 reversed - +79 feathered


     Inputs:
                horsepower: 1279
                     pitch: variable
            max engine rpm: 1700
        prop diameter (ft): 9.12118

     Outputs:
              max prop rpm: 2057.08
                gear ratio:    0.83
                       Cp0: 0.116270
                       Ct0: 0.270908
       static thrust (lbs): 5241.29
-->
<!--Reference: https://www.easa.europa.eu/system/files/dfu/EASA-TCDS-P.002_Dowty_R_408_series_propellers-03-05032008.pdf-->
<propeller name="prop">
 <ixx> 150.25 </ixx>
  <diameter unit="M"> 4.115 </diameter>
  <numblades> 6 </numblades>
  <gearratio> 30.54 </gearratio>
  <reversepitch> -15.1 </reversepitch>
  <minpitch> 1 </minpitch>
  <maxpitch> 77 </maxpitch><!--
  <minrpm> 850 </minrpm>
  <maxrpm> 1204 </maxrpm>-->
  <constspeed> 0 </constspeed> <!--controlled by FADEC-->
  <p_factor> 0.01 </p_factor>
 <ct_factor> 1.5 </ct_factor>
  <cp_factor>1.0</cp_factor>

 <!-- thrust coefficient as a function of advance ratio and blade angle -->
  <table name="C_THRUST" type="internal">
      <tableData>
                        -15.5        -5               15.5        25             35         45        55               65       77
       0.0    -0.13	0.04	0.18    0.3316    0.3654    0.3892    0.3638    0.3045   0.0000
       0.2     -0.14	0.03	0.12    0.3248    0.3603    0.3892    0.3638    0.3045   0.0000
       0.4     -0.15	0.02	0.07    0.3216    0.3535    0.3857    0.3638    0.3045   0.0000
       0.6     -0.15	-0.03	0.06    0.2894    0.3384    0.3757    0.3587    0.3045   0.0000
       0.8     -0.15	-0.1	0.055    0.2165    0.3283    0.3622    0.3587    0.3045   0.0000
       1.0     -0.15	-0.13	-0.025    0.1321    0.3148    0.3435    0.3554    0.3045   0.0000
       1.2     -0.12	-0.17	-0.1    0.0406    0.2588    0.3316    0.3554    0.3045   0.0000
       1.4     -0.12	-0.22	-0.18   -0.0593    0.1862    0.3264    0.3486    0.3045   0.0000
       1.6    -0.10	-0.24	-0.2   -0.1505    0.1015    0.3148    0.3419    0.3045   0.0000
       1.8    -0.08	-0.28	-0.32   -0.2201    0.0171    0.2707    0.3316    0.3045   0.0000
       2.0    -0.02	-0.32	-0.44  -0.2201   -0.0677    0.2114    0.3302    0.3045   0.0000
       2.4     -0.01	-0.39	-0.56   -0.2201   -0.2201    0.0812    0.2653    0.3045   0.0000
       2.6     0.0	-0.5	-0.65   -0.2201   -0.2201    0.0103    0.1678    0.2707   0.0000
       2.8     0.1	-0.7	-0.8   -0.2201   -0.2201   -0.0609    0.1099    0.2201   0.0000
       3.0     0.2	-0.9	-1   -0.2201   -0.2201   -0.1321    0.0577    0.1692   0.0000
</tableData>
  </table>

 <!-- power coefficient as a function of advance ratio and blade angle -->
  <table name="C_POWER" type="internal">
     <tableData>
               -15.5        -5        15.5        25        35        45        55        65       77
       0.0      0.13	0.135	0.135    0.2869    0.5077    0.7551    0.8748    0.9642   0.9642
       0.2      0.13	0.26	0.139	    0.2672    0.4856    0.7551    0.8748    0.9642   0.9642
       0.4      0.13	0.7	0.138    0.2463    0.4612    0.7551    0.8748    0.9642   0.9642
       0.6     0.13	0.5	0.120    0.2289    0.4322    0.7400    0.8713    0.9642   0.9642
       0.8     0.13	0.4	0.076    0.1940    0.4066    0.7063    0.8713    0.9642   0.9642
       1.2      0.14	-0.2	-0.030    0.0523    0.3392    0.6424    0.8620    0.9642   0.9642
       1.4      0.14	-0.5	-0.110   -0.0387    0.2614    0.6331    0.8515    0.9642   0.9642
       1.6      0.14	-0.11	-0.230   -0.1162    0.1650    0.6157    0.8330    0.9294   0.9642
       1.8      0.14	-0.21	-0.310   -0.1940    0.0484    0.5460    0.8074    0.9096   0.9642
       2.2      0.14	-0.29	-0.430   -0.3485   -0.1743    0.3776    0.7458    0.8515   0.9642
       2.4      0.15	-0.40	-0.550   -0.4264   -0.2904    0.2695    0.7238    0.8330   0.9642
       2.6      0.16	-0.49	-0.550   -0.5030   -0.3683    0.1127    0.7063    0.8039   0.9642
       2.8       0.23	-0.59	-0.550   -0.5809   -0.4415   -0.0383    0.6912    0.7935   0.9642
       3.2     0.31	-0.69	-0.550   -0.7354   -0.6006   -0.3102    0.6250    0.7749   0.9642
     </tableData>
  </table>

<!-- thrust effects of helical tip Mach -->
<table name="CT_MACH" type="internal">
  <tableData>
    0.85   1.0
    1.05   0.8
  </tableData>
</table>

<!-- power-required effects of helical tip Mach -->
<table name="CP_MACH" type="internal">
  <tableData>
    0.85   1.0
    1.05   1.8
    2.00   1.4
  </tableData>
</table>

</propeller>
