<?xml version="1.0"?>
<?xml-stylesheet type="text/xsl" href="http://jsbsim.sourceforge.net/JSBSim.xsl"?>

<!--
##############################################
# Copyright (c) Joshua Davidson (it0uchpods) #
##############################################
-->

<fdm_config name="Q400" version="2.0" release="BETA"
xmlns:xsi="http://www.w3.org/2001/XMLSchema-instance"
xsi:noNamespaceSchemaLocation="http://jsbsim.sourceforge.net/JSBSim.xsd">

	<fileheader>
		<author>Joshua Davidson (it0uchpods)</author>
		<version>Pre V1.0</version>
		<description>Q400 FDE</description>
	</fileheader>

	<system file="fuelpayload.xml"/>

	<metrics>
		<wingarea  unit="FT2"> 689.00 </wingarea>
		<wingspan  unit="FT" >  93.25 </wingspan>
		<wing_incidence      >   1.03 </wing_incidence>
		<chord     unit="FT" >  13.76 </chord>
		<htailarea unit="FT2">  32.80 </htailarea>
		<htailarm  unit="FT" >  13.28 </htailarm>
		<vtailarea unit="FT2">  49.21 </vtailarea>
		<vtailarm  unit="FT" >  16.07 </vtailarm>

		<location name="AERORP" unit="M">
			<x> 0.58265 </x>
			<y> 0 </y>
			<z> 1.71115 </z>
		</location>

		<location name="EYEPOINT" unit="M">
			<x> 0 </x>
			<y> 0 </y>
			<z> 0 </z>
		</location>

		<location name="VRP" unit="M">
			<x> 0 </x>
			<y> 0 </y>
			<z> 0 </z>
		</location>
	</metrics>

	<mass_balance>
		<ixx unit="SLUG*FT2">  385013 </ixx>
		<iyy unit="SLUG*FT2">  803956 </iyy>
		<izz unit="SLUG*FT2"> 1224581 </izz>

		<ixy unit="SLUG*FT2">       0 </ixy>
		<ixz unit="SLUG*FT2">       0 </ixz>
		<iyz unit="SLUG*FT2">       0 </iyz>
		<emptywt unit="LBS" >   39284 </emptywt>

		<location name="CG" unit="M">
			<x> 0.54265 </x>
			<y> 0 </y>
			<z> 1.71115 </z>
		</location>

		<pointmass name="Cockpit Crew">
			<weight unit="LBS">400</weight>
			<location name="POINTMASS" unit="M">
				<x> -11.55 </x>
				<y> 0 </y>
				<z> 2.2 </z>
			</location>
		</pointmass>

		<pointmass name="PAX Front">
			<weight unit="LBS">300</weight>
			<location name="POINTMASS" unit="M">
				<x> -4.5 </x>
				<y> 0 </y>
				<z> 2.2 </z>
			</location>
		</pointmass>

		<pointmass name="PAX Rear">
			<weight unit="LBS">300</weight>
			<location name="POINTMASS" unit="M">
				<x> 3.2 </x>
				<y> 0 </y>
				<z> 2.4 </z>
			</location>
		</pointmass>

		<pointmass name="Cargo">
			<weight unit="LBS">0</weight>
			<location name="POINTMASS" unit="M">
				<x> 9.2 </x>
				<y> 0 </y>
				<z> 2.4 </z>
			</location>
		</pointmass>
	</mass_balance>

	<ground_reactions>
		<contact type="BOGEY" name="NOSE_LG">
			<location unit="M">
				<x> -12.54159 </x>
				<y> 0 </y>
				<z> -0.0059 </z>
			</location>
			<static_friction> 0.4 </static_friction>
			<dynamic_friction> 0.6 </dynamic_friction>
			<rolling_friction> 0.02 </rolling_friction>
			<spring_coeff unit="LBS/FT"> 30935.5 </spring_coeff>
			<damping_coeff unit="LBS/FT/SEC"> 16978.5 </damping_coeff>
			<max_steer unit="DEG"> 70 </max_steer>
			<brake_group> NOSE </brake_group>
			<retractable>1</retractable>
		</contact>
		<contact type="BOGEY" name="LEFT_MLG">
			<location unit="M">
				<x> 1.11067 </x>
				<y> -4.6128 </y>
				<z> -0.012 </z>
			</location>
			<static_friction> 0.4 </static_friction>
			<dynamic_friction> 0.6 </dynamic_friction>
			<rolling_friction> 0.02 </rolling_friction>
			<spring_coeff unit="LBS/FT"> 59785 </spring_coeff>
			<damping_coeff unit="LBS/FT/SEC"> 23957 </damping_coeff>
			<max_steer unit="DEG"> 0.0 </max_steer>
			<brake_group> LEFT </brake_group>
			<retractable>1</retractable>
		</contact>
		<contact type="BOGEY" name="RIGHT_MLG">
			<location unit="M">
				<x> 1.11067 </x>
				<y> 4.6128 </y>
				<z> -0.012 </z>
			</location>
			<static_friction> 0.4 </static_friction>
			<dynamic_friction> 0.6 </dynamic_friction>
			<rolling_friction> 0.02 </rolling_friction>
			<spring_coeff unit="LBS/FT"> 59785 </spring_coeff>
			<damping_coeff unit="LBS/FT/SEC"> 23957 </damping_coeff>
			<max_steer unit="DEG"> 0.0 </max_steer>
			<brake_group> RIGHT </brake_group>
			<retractable>1</retractable>
		</contact>

		<contact type="STRUCTURE" name="NOSE_1">
			<location unit="M">
				<x> -14.3831 </x>
				<y> 0 </y>
				<z> 1.18355 </z>
			</location>
			<static_friction> 1.0 </static_friction>
			<dynamic_friction> 0.4 </dynamic_friction>
			<rolling_friction> 0.4 </rolling_friction>
			<spring_coeff unit="LBS/FT"> 50000 </spring_coeff>
			<damping_coeff unit="LBS/FT/SEC"> 50000 </damping_coeff>
			<max_steer unit="DEG"> 0.0 </max_steer>
			<brake_group> NONE </brake_group>
			<retractable>0</retractable>
		</contact>
		<contact type="STRUCTURE" name="NOSE_2">
			<location unit="M">
				<x> -11.724 </x>
				<y> 0 </y>
				<z> 3.17653 </z>
			</location>
			<static_friction> 1.0 </static_friction>
			<dynamic_friction> 0.4 </dynamic_friction>
			<rolling_friction> 0.4 </rolling_friction>
			<spring_coeff unit="LBS/FT"> 50000 </spring_coeff>
			<damping_coeff unit="LBS/FT/SEC"> 50000 </damping_coeff>
			<max_steer unit="DEG"> 0.0 </max_steer>
			<brake_group> NONE </brake_group>
			<retractable>0</retractable>
		</contact>

		<contact type="STRUCTURE" name="BOTTOM_1">
			<location unit="M">
				<x> -11.1607 </x>
				<y> 0 </y>
				<z> 0.75394 </z>
			</location>
			<static_friction> 1.0 </static_friction>
			<dynamic_friction> 0.4 </dynamic_friction>
			<rolling_friction> 0.4 </rolling_friction>
			<spring_coeff unit="LBS/FT"> 50000 </spring_coeff>
			<damping_coeff unit="LBS/FT/SEC"> 50000 </damping_coeff>
			<max_steer unit="DEG"> 0.0 </max_steer>
			<brake_group> NONE </brake_group>
			<retractable>0</retractable>
		</contact>
		<contact type="STRUCTURE" name="BOTTOM_2">
			<location unit="M">
				<x> 7.38987 </x>
				<y> 0 </y>
				<z> 1.07175 </z>
			</location>
			<static_friction> 1.0 </static_friction>
			<dynamic_friction> 0.4 </dynamic_friction>
			<rolling_friction> 0.4 </rolling_friction>
			<spring_coeff unit="LBS/FT"> 50000 </spring_coeff>
			<damping_coeff unit="LBS/FT/SEC"> 50000 </damping_coeff>
			<max_steer unit="DEG"> 0.0 </max_steer>
			<brake_group> NONE </brake_group>
			<retractable>0</retractable>
		</contact>

		<contact type="STRUCTURE" name="TOP_1">
			<location unit="M">
				<x> -7.67275 </x>
				<y> 0 </y>
				<z> 3.38003 </z>
			</location>
			<static_friction> 1.0 </static_friction>
			<dynamic_friction> 0.4 </dynamic_friction>
			<rolling_friction> 0.4 </rolling_friction>
			<spring_coeff unit="LBS/FT"> 50000 </spring_coeff>
			<damping_coeff unit="LBS/FT/SEC"> 50000 </damping_coeff>
			<max_steer unit="DEG"> 0.0 </max_steer>
			<brake_group> NONE </brake_group>
			<retractable>0</retractable>
		</contact>
		<contact type="STRUCTURE" name="TOP_2">
			<location unit="M">
				<x> 8.35559 </x>
				<y> 0 </y>
				<z> 3.99113 </z>
			</location>
			<static_friction> 1.0 </static_friction>
			<dynamic_friction> 0.4 </dynamic_friction>
			<rolling_friction> 0.4 </rolling_friction>
			<spring_coeff unit="LBS/FT"> 50000 </spring_coeff>
			<damping_coeff unit="LBS/FT/SEC"> 50000 </damping_coeff>
			<max_steer unit="DEG"> 0.0 </max_steer>
			<brake_group> NONE </brake_group>
			<retractable>0</retractable>
		</contact>

		<contact type="STRUCTURE" name="ENG_1_FAN_BOTTOM">
			<location unit="M">
				<x> -3.33331 </x>
				<y> -4.37881 </y>
				<z> 1.08987 </z>
			</location>
			<static_friction> 1.0 </static_friction>
			<dynamic_friction> 0.4 </dynamic_friction>
			<rolling_friction> 0.4 </rolling_friction>
			<spring_coeff unit="LBS/FT"> 50000 </spring_coeff>
			<damping_coeff unit="LBS/FT/SEC"> 50000 </damping_coeff>
			<max_steer unit="DEG"> 0.0 </max_steer>
			<brake_group> NONE </brake_group>
			<retractable>0</retractable>
		</contact>
		<contact type="STRUCTURE" name="ENG_2_FAN_BOTTOM">
			<location unit="M">
				<x> -3.33331 </x>
				<y> 4.37881 </y>
				<z> 1.08987 </z>
			</location>
			<static_friction> 1.0 </static_friction>
			<dynamic_friction> 0.4 </dynamic_friction>
			<rolling_friction> 0.4 </rolling_friction>
			<spring_coeff unit="LBS/FT"> 50000 </spring_coeff>
			<damping_coeff unit="LBS/FT/SEC"> 50000 </damping_coeff>
			<max_steer unit="DEG"> 0.0 </max_steer>
			<brake_group> NONE </brake_group>
			<retractable>0</retractable>
		</contact>
		<contact type="STRUCTURE" name="ENG_1_BOTTOM">
			<location unit="M">
				<x> 0.80508 </x>
				<y> -4.73245 </y>
				<z> 2.0868 </z>
			</location>
			<static_friction> 1.0 </static_friction>
			<dynamic_friction> 0.4 </dynamic_friction>
			<rolling_friction> 0.4 </rolling_friction>
			<spring_coeff unit="LBS/FT"> 50000 </spring_coeff>
			<damping_coeff unit="LBS/FT/SEC"> 50000 </damping_coeff>
			<max_steer unit="DEG"> 0.0 </max_steer>
			<brake_group> NONE </brake_group>
			<retractable>0</retractable>
		</contact>
		<contact type="STRUCTURE" name="ENG_2_BOTTOM">
			<location unit="M">
				<x> 0.80508 </x>
				<y> 4.73245 </y>
				<z> 2.0868 </z>
			</location>
			<static_friction> 1.0 </static_friction>
			<dynamic_friction> 0.4 </dynamic_friction>
			<rolling_friction> 0.4 </rolling_friction>
			<spring_coeff unit="LBS/FT"> 50000 </spring_coeff>
			<damping_coeff unit="LBS/FT/SEC"> 50000 </damping_coeff>
			<max_steer unit="DEG"> 0.0 </max_steer>
			<brake_group> NONE </brake_group>
			<retractable>0</retractable>
		</contact>

		<contact type="STRUCTURE" name="ENG_1_FAN_TOP">
			<location unit="M">
				<x> -3.33331 </x>
				<y> -4.37881 </y>
				<z> 5.31077 </z>
			</location>
			<static_friction> 1.0 </static_friction>
			<dynamic_friction> 0.4 </dynamic_friction>
			<rolling_friction> 0.4 </rolling_friction>
			<spring_coeff unit="LBS/FT"> 50000 </spring_coeff>
			<damping_coeff unit="LBS/FT/SEC"> 50000 </damping_coeff>
			<max_steer unit="DEG"> 0.0 </max_steer>
			<brake_group> NONE </brake_group>
			<retractable>0</retractable>
		</contact>
		<contact type="STRUCTURE" name="ENG_2_FAN_TOP">
			<location unit="M">
				<x> -3.33331 </x>
				<y> 4.37881 </y>
				<z> 5.31077 </z>
			</location>
			<static_friction> 1.0 </static_friction>
			<dynamic_friction> 0.4 </dynamic_friction>
			<rolling_friction> 0.4 </rolling_friction>
			<spring_coeff unit="LBS/FT"> 50000 </spring_coeff>
			<damping_coeff unit="LBS/FT/SEC"> 50000 </damping_coeff>
			<max_steer unit="DEG"> 0.0 </max_steer>
			<brake_group> NONE </brake_group>
			<retractable>0</retractable>
		</contact>
		<contact type="STRUCTURE" name="ENG_1_TOP">
			<location unit="M">
				<x> -0.98556 </x>
				<y> -4.48552 </y>
				<z> 3.78763 </z>
			</location>
			<static_friction> 1.0 </static_friction>
			<dynamic_friction> 0.4 </dynamic_friction>
			<rolling_friction> 0.4 </rolling_friction>
			<spring_coeff unit="LBS/FT"> 50000 </spring_coeff>
			<damping_coeff unit="LBS/FT/SEC"> 50000 </damping_coeff>
			<max_steer unit="DEG"> 0.0 </max_steer>
			<brake_group> NONE </brake_group>
			<retractable>0</retractable>
		</contact>
		<contact type="STRUCTURE" name="ENG_2_TOP">
			<location unit="M">
				<x> -0.98556 </x>
				<y> 4.48552 </y>
				<z> 3.78763 </z>
			</location>
			<static_friction> 1.0 </static_friction>
			<dynamic_friction> 0.4 </dynamic_friction>
			<rolling_friction> 0.4 </rolling_friction>
			<spring_coeff unit="LBS/FT"> 50000 </spring_coeff>
			<damping_coeff unit="LBS/FT/SEC"> 50000 </damping_coeff>
			<max_steer unit="DEG"> 0.0 </max_steer>
			<brake_group> NONE </brake_group>
			<retractable>0</retractable>
		</contact>

		<contact type="STRUCTURE" name="TAIL_1">
			<location unit="M">
				<x> 16.4773 </x>
				<y> 0 </y>
				<z> 3.2654 </z>
			</location>
			<static_friction> 1.0 </static_friction>
			<dynamic_friction> 0.4 </dynamic_friction>
			<rolling_friction> 0.4 </rolling_friction>
			<spring_coeff unit="LBS/FT"> 50000 </spring_coeff>
			<damping_coeff unit="LBS/FT/SEC"> 50000 </damping_coeff>
			<max_steer unit="DEG"> 0.0 </max_steer>
			<brake_group> NONE </brake_group>
			<retractable>0</retractable>
		</contact>
		<contact type="STRUCTURE" name="TAIL_2">
			<location unit="M">
				<x> 16.7289 </x>
				<y> 0 </y>
				<z> 8.26156 </z>
			</location>
			<static_friction> 1.0 </static_friction>
			<dynamic_friction> 0.4 </dynamic_friction>
			<rolling_friction> 0.4 </rolling_friction>
			<spring_coeff unit="LBS/FT"> 50000 </spring_coeff>
			<damping_coeff unit="LBS/FT/SEC"> 50000 </damping_coeff>
			<max_steer unit="DEG"> 0.0 </max_steer>
			<brake_group> NONE </brake_group>
			<retractable>0</retractable>
		</contact>

		<contact type="STRUCTURE" name="WING_TIP_1">
			<location unit="M">
				<x> 0.7223 </x>
				<y> -14.2253 </y>
				<z> 4.13349 </z>
			</location>
			<static_friction> 1.0 </static_friction>
			<dynamic_friction> 0.4 </dynamic_friction>
			<rolling_friction> 0.4 </rolling_friction>
			<spring_coeff unit="LBS/FT"> 50000 </spring_coeff>
			<damping_coeff unit="LBS/FT/SEC"> 50000 </damping_coeff>
			<max_steer unit="DEG"> 0.0 </max_steer>
			<brake_group> NONE </brake_group>
			<retractable>0</retractable>
		</contact>
		<contact type="STRUCTURE" name="WING_TIP_2">
			<location unit="M">
				<x> 0.7223 </x>
				<y> 14.2253 </y>
				<z> 4.13349 </z>
			</location>
			<static_friction> 1.0 </static_friction>
			<dynamic_friction> 1 </dynamic_friction>
			<rolling_friction> 1 </rolling_friction>
			<spring_coeff unit="LBS/FT"> 50000 </spring_coeff>
			<damping_coeff unit="LBS/FT/SEC"> 50000 </damping_coeff>
			<max_steer unit="DEG"> 0.0 </max_steer>
			<brake_group> NONE </brake_group>
			<retractable>0</retractable>
		</contact>
	</ground_reactions>

	<propulsion>
		<engine file="PW150A">
			<location unit="M">
				<x> -1.13603 </x>
				<y>-4.3686 </y>
				<z> 3.18561 </z>
			</location>
			<orient unit="DEG">
				<roll> 0.0 </roll>
				<pitch> 0.0 </pitch>
				<yaw> 0.0 </yaw>
			</orient>
				<feed>0</feed>
				<feed>1</feed>
			<thruster file="R408">
				<location unit="M">
					<x> -3.39427 </x>
					<y> -4.36282 </y>
					<z> 3.20629 </z>
				</location>
				<orient unit="DEG">
					<roll> 0.0 </roll>
					<pitch> 0.0 </pitch>
					<yaw> 0.0 </yaw>
				</orient>
			</thruster>
		</engine>

		<engine file="PW150A">
			<location unit="M">
				<x> -1.13603 </x>
				<y>4.3686 </y>
				<z> 3.18561 </z>
			</location>
			<orient unit="DEG">
				<roll> 0.0 </roll>
				<pitch> 0.0 </pitch>
				<yaw> 0.0 </yaw>
			</orient>
				<feed>0</feed>
				<feed>1</feed>
			<thruster file="R408">
				<location unit="M">
					<x> -3.39427 </x>
					<y> 4.36282 </y>
					<z> 3.20629 </z>
				</location>
				<orient unit="DEG">
					<roll> 0.0 </roll>
					<pitch> 0.0 </pitch>
					<yaw> 0.0 </yaw>
				</orient>
			</thruster>
		</engine>

		<tank type="FUEL"> <!-- Left Wing Tank -->
			<location unit="M">
				<x> 0.37127 </x>
				<y> 0 </y>
				<z> 1.71115 </z>
			</location>
			<capacity unit="LBS"> 7000 </capacity>
			<contents unit="LBS"> 5000 </contents>

			<priority>1</priority>
			<type>JET-A1</type>
		</tank>

		<tank type="FUEL"> <!-- Right Wing Tank -->
			<location unit="M">
				<x> 0.37127 </x>
				<y> 0 </y>
				<z> 1.71115 </z>
			</location>
			<capacity unit="LBS"> 7000 </capacity>
			<contents unit="LBS"> 5000 </contents>

			<priority>1</priority>
			<type>JET-A1</type>
		</tank>
	</propulsion>

	<system file="pushback" />
	<system file="q400-fcs" />
	<system file="fadec" />

	<flight_control name="none"/>

	<aerodynamics file="Systems/q400-aerodynamics.xml" />

	<external_reactions>
		<force name="pushback" frame="BODY">
			<location unit="M">
				<x> -12.4539 </x>
				<y> 0 </y>
				<z> 1.35625 </z>
			</location>
			<direction>
				<x> 1 </x>
				<y> 0 </y>
				<z> 0 </z>
			</direction>
		</force>
	</external_reactions>
</fdm_config>
